OpenVSP model (file version 5), 6 components.
Geometry view with OpenVSP parameter names; values to 6 digits, angles in degrees, lengths in the model's unit.
Overall bounding box: X_Min=-0.866982 X_Len=29.6164 Y_Min=-12.5 Y_Len=25 Z_Min=-2.25 Z_Len=6.25

Fuselage "FuselageGeom"
  location (X Y Z) 0 0 0, rotation 0 0 0
  bounding box size 28.867 3 4.5
  Design: Length=28
  cross sections:
    n  XLocPercent  YLocPercent  ZLocPercent  shape
    0  0            0            0            rounded rectangle RoundRectXSec_Radius=0.2 RoundedRect_Height=2 RoundedRect_Width=2
    1  0.25         0            0            rounded rectangle RoundRectXSec_Radius=0.2 RoundedRect_Height=3 RoundedRect_Width=3
    2  0.5          0            0            rounded rectangle RoundRectXSec_Radius=0.2 RoundedRect_Height=4.5 RoundedRect_Width=3
    3  0.75         0            0            rounded rectangle RoundRectXSec_Radius=0.2 RoundedRect_Height=3 RoundedRect_Width=1.5
    4  1            0            0            rounded rectangle RoundRectXSec_Radius=0.2 RoundedRect_Height=2 RoundedRect_Width=1.5
  SS_Ellipse "SS_ELLIP_0": Center_U=0.35 Center_W=0.745 U_Length=0.2 W_Length=0.2

Wing "WingGeom", child of "FuselageGeom"
  location (X Y Z) 12.5 0 2.42, rotation 0 0 0
  symmetric about XZ
  bounding box size 4 25 0.400232
  totals: TotalSpan=25 TotalProjectedSpan=25 TotalChord=4 TotalArea=100 TotalAR=6.25 MAC=4
  root: chord 4, twist 0, NACA 4-series Camber=0 CamberLoc=0.2 ThickChord=0.1
  sections:
    n  Span  Root_Chord  Tip_Chord  Area  Sweep  Sweep_Location  Dihedral  Twist  Twist_Location  tip airfoil
    1  12.5  4           4          50    0      0               0         0      0.25            as above
  SS_Rectangle "SS_RECT_0": Center_U=0.55 Center_W=0.915 U_Length=0.2 W_Length=0.15

Wing "WingGeom", child of "FuselageGeom"
  location (X Y Z) 25 0 0, rotation 0 0 0
  symmetric about XZ
  bounding box size 3.74939 8.5 0.300174
  totals: TotalSpan=8.5 TotalProjectedSpan=8.5 TotalChord=3 TotalArea=25.5 TotalAR=2.83333 MAC=3
  root: chord 3, twist 0, NACA 4-series Camber=0 CamberLoc=0.2 ThickChord=0.1
  sections:
    n  Span  Root_Chord  Tip_Chord  Area   Sweep  Sweep_Location  Dihedral  Twist  Twist_Location  tip airfoil
    1  4.25  3           3          12.75  10     0               0         0      0.25            as above

Wing "WingGeom", child of "FuselageGeom"
  location (X Y Z) 24.5 0 0, rotation 90 0 0
  symmetric about XZ
  bounding box size 3.5594 0.350203 4
  totals: TotalSpan=8 TotalProjectedSpan=8 TotalChord=2.375 TotalArea=19 TotalAR=3.36842 MAC=2.55263
  root: chord 3.5, twist 0, NACA 4-series Camber=0 CamberLoc=0.2 ThickChord=0.1
  sections:
    n  Span  Root_Chord  Tip_Chord  Area  Sweep  Sweep_Location  Dihedral  Twist  Twist_Location  tip airfoil
    1  4     3.5         1.25       9.5   30     0               0         0      0.25            as above

NGonMesh "MeshGeom_NGon"
  location (X Y Z) 0 0 0, rotation 0 0 0

NGonMesh "MeshGeom_NGon"
  location (X Y Z) 0 0 0, rotation 0 0 0
